test_v := 4
test_e := 5
avg_w_V(T) :=
    t_i ← 0
    k ← 0
    while t_i < rows(T)
        res[k, 0] ← T[t_i, 0]
        s ← 0
        denom ← 0
        for i ∈ 0 .. test_v
            s ← s + T[t_i, 2]*T[t_i, 1]
            denom ← denom + T[t_i, 1]
            t_i ← t_i + 1
        res[k, 1] ← s/denom
        k ← k + 1
    return res
avg_s_V(T) :=
    t_i ← 0
    k ← 0
    while t_i < rows(T)
        res[k, 0] ← T[t_i, 0]
        s ← 0
        denom ← 0
        for i ∈ 0 .. test_v
            s ← s + T[t_i, 2]
            denom ← denom + 1
            t_i ← t_i + 1
        res[k, 1] ← s/denom
        k ← k + 1
    return res
avg_w_E(T) :=
    k ← 0
    while k < test_e
        t_i ← k
        res[k, 0] ← T[k, 1]
        s ← 0
        denom ← 0
        while t_i < rows(T)
            s ← s + T[t_i, 2]*T[t_i, 1]
            denom ← denom + T[t_i, 1]
            t_i ← t_i + test_v
        res[k, 1] ← s/denom
        k ← k + 1
    return res
avg_s_E(T) :=
    k ← 0
    while k < test_e
        t_i ← k
        res[k, 0] ← T[k, 1]
        s ← 0
        denom ← 0
        while t_i < rows(T)
            s ← s + T[t_i, 2]
            denom ← denom + 1
            t_i ← t_i + test_v
        res[k, 1] ← s/denom
        k ← k + 1
    return res
avg_V(T) := avg_w_V(T)
avg_E(T) := avg_w_E(T)
SDGPP := [
    1000, 250000, 0.251039;
    1000, 400000, 0.423246;
    1000, 500000, 0.52939;
    1000, 700000, 0.526252;
    1000, 800000, 0.529853;
    2000, 250000, 0.535313;
    2000, 400000, 0.814182;
    2000, 500000, 1.04294;
    2000, 700000, 1.49712;
    2000, 800000, 1.71742;
    4000, 250000, 1.29269;
    4000, 400000, 1.84015;
    4000, 500000, 2.30892;
    4000, 700000, 3.1891;
    4000, 800000, 3.68713;
    5000, 250000, 1.72453;
    5000, 400000, 2.41507;
    5000, 500000, 2.96468;
    5000, 700000, 4.11848;
    5000, 800000, 4.81892
]
SVKB := [
    1000, 250000, 0.00362835;
    1000, 400000, 0.00426158;
    1000, 500000, 0.00464215;
    1000, 700000, 0.00480707;
    1000, 800000, 0.0045608;
    2000, 250000, 0.0114717;
    2000, 400000, 0.0117687;
    2000, 500000, 0.0121139;
    2000, 700000, 0.013328;
    2000, 800000, 0.0133219;
    4000, 250000, 0.0436174;
    4000, 400000, 0.0424419;
    4000, 500000, 0.0420754;
    4000, 700000, 0.043257;
    4000, 800000, 0.0437447;
    5000, 250000, 0.068323;
    5000, 400000, 0.0646401;
    5000, 500000, 0.0646765;
    5000, 700000, 0.0656466;
    5000, 800000, 0.0659254
]
BDGPP := [
    1000, 250000, 0.290314;
    1000, 400000, 0.449504;
    1000, 500000, 0.431181;
    1000, 700000, 0.413933;
    1000, 800000, 0.407407;
    2000, 250000, 1.17398;
    2000, 400000, 0.800863;
    2000, 500000, 0.686597;
    2000, 700000, 0.922706;
    2000, 800000, 1.0432;
    4000, 250000, 7.14889;
    4000, 400000, 9.08382;
    4000, 500000, 9.02387;
    4000, 700000, 8.44287;
    4000, 800000, 9.48265;
    5000, 250000, 10.0793;
    5000, 400000, 13.1377;
    5000, 500000, 15.8774;
    5000, 700000, 17.0063;
    5000, 800000, 16.3744
]
SVSSS := [
    1000, 250000, 2.46784;
    1000, 400000, 4.05978;
    1000, 500000, 5.14639;
    1000, 700000, 5.19518;
    1000, 800000, 5.10902;
    2000, 250000, 5.07009;
    2000, 400000, 8.27279;
    2000, 500000, 10.3856;
    2000, 700000, 14.5847;
    2000, 800000, 16.9524;
    4000, 250000, 10.7127;
    4000, 400000, 17.1236;
    4000, 500000, 21.5502;
    4000, 700000, 29.7789;
    4000, 800000, 33.9746;
    5000, 250000, 13.6766;
    5000, 400000, 21.6994;
    5000, 500000, 26.5401;
    5000, 700000, 37.066;
    5000, 800000, 43.0041
]
BVKB := [
    1000, 250000, 0.00357827;
    1000, 400000, 0.00469606;
    1000, 500000, 0.004831;
    1000, 700000, 0.00464981;
    1000, 800000, 0.00451104;
    2000, 250000, 0.00962946;
    2000, 400000, 0.0102467;
    2000, 500000, 0.0111246;
    2000, 700000, 0.0115058;
    2000, 800000, 0.0118453;
    4000, 250000, 0.0326217;
    4000, 400000, 0.0332607;
    4000, 500000, 0.0337187;
    4000, 700000, 0.0354832;
    4000, 800000, 0.0354666;
    5000, 250000, 0.0496016;
    5000, 400000, 0.0501701;
    5000, 500000, 0.0505912;
    5000, 700000, 0.0526405;
    5000, 800000, 0.0517788
]
BVSSS := [
    1000, 250000, 0.00543519;
    1000, 400000, 0.0077148;
    1000, 500000, 0.00968369;
    1000, 700000, 0.0097057;
    1000, 800000, 0.00970347;
    2000, 250000, 0.00787813;
    2000, 400000, 0.010331;
    2000, 500000, 0.0117288;
    2000, 700000, 0.0151093;
    2000, 800000, 0.0166259;
    4000, 250000, 0.0151773;
    4000, 400000, 0.0180572;
    4000, 500000, 0.0191741;
    4000, 700000, 0.0224707;
    4000, 800000, 0.0234325;
    5000, 250000, 0.0201792;
    5000, 400000, 0.0227163;
    5000, 500000, 0.0244108;
    5000, 700000, 0.0271808;
    5000, 800000, 0.0296336
]
SDGPP_V := avg_V(SDGPP)
SVKB_V := avg_V(SVKB)
BDGPP_V := avg_V(BDGPP)
BVKB_V := avg_V(BVKB)
SDGPP_E := avg_E(SDGPP)
SVSSS_V := avg_V(SVSSS)
SVKB_E := avg_E(SVKB)
BDGPP_E := avg_E(BDGPP)
BVSSS_V := avg_V(BVSSS)
BVKB_E := avg_E(BVKB)
SVSSS_E := avg_E(SVSSS)
BVSSS_E := avg_E(BVSSS)
SDGPP_V = [1000, 0.48642; 2000, 1.28411; 4000, 2.79086; 5000, 3.62927]
SVKB_V = [1000, 0.00450807; 2000, 0.0126866; 4000, 0.0430923; 5000, 0.0656483]
BDGPP_V = [1000, 0.408924; 2000, 0.919846; 4000, 8.84106; 5000, 15.3651]
BVKB_V = [1000, 0.004548; 2000, 0.0111693; 4000, 0.0345398; 5000, 0.0513341]
SVSSS_V = [1000, 4.73129; 2000, 12.6568; 4000, 25.784; 5000, 32.3466]
BVSSS_V = [1000, 0.00899748; 2000, 0.0135259; 4000, 0.0207848; 5000, 0.0260642]
SDGPP_E = [250000, 1.37929; 400000, 2.03463; 500000, 2.54573; 700000, 2.23101; 800000, 1.49681]
SVKB_E = [250000, 0.0229355; 400000, 0.0293767; 500000, 0.0373137; 700000, 0.0363093; 800000, 0.0249467]
BDGPP_E = [250000, 4.07978; 400000, 5.71946; 500000, 8.23158; 700000, 7.50412; 800000, 4.47451]
BVKB_E = [250000, 0.0186735; 400000, 0.0241116; 500000, 0.0301476; 700000, 0.0286584; 800000, 0.020246]
SVSSS_E = [250000, 12.9692; 400000, 19.0825; 500000, 23.2779; 700000, 20.1892; 800000, 14.0631]
BVSSS_E = [250000, 0.0144799; 400000, 0.0174683; 500000, 0.0190721; 700000, 0.0183521; 800000, 0.015422]
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# [component: inputs (SDGPP[:, 0], SDGPP[:, 1], SDGPP[:, 2])]
# [component: inputs (BDGPP[:, 0], BDGPP[:, 1], BDGPP[:, 2])]
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# [component: inputs (SVKB[:, 0], SVKB[:, 1], SVKB[:, 2])]
# [component: inputs (BVKB[:, 0], BVKB[:, 1], BVKB[:, 2])]
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# [component: inputs (BVSSS[:, 0], BVSSS[:, 1], BVSSS[:, 2])]
# [component: inputs (SVSSS[:, 0], SVSSS[:, 1], SVSSS[:, 2])]
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